m := 0
n := 7
Kou := (m + 1)*(n + 1)/(m + n) = 1.14286
Upr := 1, 1 + 0.1 .. 10
Ri := 0.05*(2*m + 3*n) = 1.05
In := transpose([0, 0.5, 1, 1.5, 2])
Uout(Upr, In) := Kou*Upr - Ri*In
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# График выходного напряжения линейно увеличивается
absol(Upr, In) := Uout(Upr, In) - Uout(Upr, 0)
otnos(Upr, In) := absol(Upr, In)/Uout(Upr, 0)*100*%
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# Чем выше Upr тем меньше погрешность
Kdt := Ri/Kou
gpr := 1, 1 + 0.1 .. 10
Uout2(gpr, In) := Kou*gpr + (Kou*Kdt - Ri)*In
Δ(gpr, In) := Uout2(gpr, In) - Uout2(gpr, 0)
otnos2(gpr, In) := Δ(gpr, In)/Uout2(gpr, 0)*100*%
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x(gpr, In) := 1/(1/Kou + 1)*gpr - Ri/(1 + Kou)*In
Uout3(gpr, In) := Kou*(gpr - x(gpr, 0)) - Ri*In
Δ3(gpr, In) := Uout3(gpr, In) - Uout3(gpr, 0)
otnos3(gpr, In) := Δ3(gpr, In)/Uout3(gpr, 0)*100*%
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